# Inputs of the circuit: 28V bus (+28V, -0V) and a tachometer signal w/ a square wave (50% duty cycle, period/frequency depends on fan spin speed.)
# A voltage regulator will be used to transform the input from 28V to 5V
# A intergrator will be used (aka High pass filter). This will insure that the 555 will trigger at falling edge only. The intergrator will be pull up to Vcc, and a cut-off diode will be used to ensure the voltage does not spike on leading edges.
# Input signal will be from tachometer. It will have a signal with T period and 50% duty cycle.
# 555 timer will trigger on fall edge
# PWM on for as long as T_on (calculated below).
# 555 will output low for as long as T - T_on.
# Pluse width period will be the same as input signal period, but duty cycle will have changed. (This fact will be used in our low pass filter and Sallen-Key filter to calculate the avgerage voltage of this signal)
R1 := 1*10^6
C1 := 10*10^-9
T_on := R1*C1*ln(3) = 0.0109861
# Passive Low Pass Filter  Sallen-Key Filter
R4 := 10*10^3
C6 := 10*10^-9
R2 := 100*10^3
C4 := 1*10^-6
f_cLPF := 1/(2*π*R4*C6) = 1591.55
R3 := R2 = 100000
C5 := C4 = 1e-6
f_cSKF := 1/(2*π*R2*C4) = 1.59155
# the passive LPF is to ensure no high frequencies are going into the OP-AMP. Most of the filter is done by the Sallen-key. The Sallen-key will avgerage out the voltage. This is becuase fc is less then the input frequency.
# Comparator using a Schimitt trigger with positive feed back. The comparator will have an output high or low depending on input voltage. This comparator circuit has a hysteresis effect built in of roughly 5Hz (0.275V). The calculation for upper and lower thershold (UT and LT)is below
R6 := 1*10^3
R7 := 20*10^3
V_L := 0
V_H := 5
V_ref := 2.45
f_hysteresis := 5
T_UT := T_on*V_H/V_ref = 0.0224207
f_UT := 1/T_UT = 44.6017
V_UT := V_ref
f_LT := f_UT - f_hysteresis = 39.6017
T_LT := 1/f_LT = 0.0252514
V_LT := T_on*V_H/T_LT = 2.17535
V_UT = 2.45
V_hysteresis := V_UT - V_LT = 0.274653
# Vref will be created using a voltage divider circuit from Vcc. Vref is the UT and will depend on what design wants it to be. The LT will depend on how much hysteresis you would like. This will change your resistor values. R6 and R7 are used in the following formula:
# Vlt = -R1*V_H/R2 - Vref
V_actualUT := V_ref = 2.45
V_actualLT := -R6/R7*V_H + V_ref = 2.2
# Using those resistor values. Those are the actual UT and LT for voltage. The LT for frequency and period would also have changed.
# MOSFET circuit is just an on and off circuit. the drain will be the output of the circuit. R8 is a circuit limitter, and R9 is for safety when switching MOSFET from on and off states.
